*HEADING
** Acoustic Transmission Loss Simulation - Graded Medium
** Continuous density/bulk modulus variation with depth
** Units: m-kg-s-Pa (SI system)
** Frequency range: 100-5000 Hz
** Author: Abaqus Acoustic Simulation
** Date: 2024

*NODE
1, 0.0, 0.0
2, 0.0, 0.5
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
*ELEMENT, TYPE=AC2D4
1, 1, 6, 7, 2
2, 2, 7, 8, 3
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
*NSET, NSET=INLET
1, 2, 3, 4, 5

*NSET, NSET=OUTLET
21, 22, 23, 24, 25

*NSET, NSET=PROBE_IN
11, 12, 13, 14, 15

*NSET, NSET=PROBE_OUT
16, 17, 18, 19, 20

*NSET, NSET=ALL_NODES
1, 2, 3, 4, 5, 6
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
*ELSET, ELSET=ALL_ELEMENTS
1, 2, 3, 4, 5, 6
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
** Graded material with field variable dependence
*MATERIAL, NAME=GRADED_WATER
*DENSITY, DEPENDENCIES=1
** Density varies linearly with depth: rho(z) = 1025 - 45*z
** Field variable F1 = z (depth)
1025.0, 0.0
980.0, 1.0
*BULK MODULUS, DEPENDENCIES=1
** Bulk modulus varies linearly with depth: K(z) = 2.306e9 - 1.44e8*z
2.306e9, 0.0
2.162e9, 1.0

*SOLID SECTION, ELSET=ALL_ELEMENTS, MATERIAL=GRADED_WATER
1.0

** Define field variable F1 = z (vertical coordinate)
*INITIAL CONDITIONS, TYPE=FIELD
ALL_NODES, 1, 0.0

** Analytical field to define F1 = z
*FIELD, VARIABLE=1
ALL_NODES, 0.0, 0.0, 0.0
ALL_NODES, 0.0, 1.0, 1.0
ALL_NODES, 0.0, 2.0, 2.0

*SURFACE, NAME=SURF_INLET
INLET, S1

*SURFACE, NAME=SURF_OUTLET
OUTLET, S1

*STEP, NAME=SSD, NLGEOM=NO
*STEADY STATE DYNAMICS, DIRECT
100.0, 5000.0, 25.0

** Incident wave interaction property
*INCIDENT WAVE INTERACTION PROPERTY, NAME=PLANEWAVE
*INCIDENT WAVE FLUID PROPERTY
1025.0, 1500.0

** Incident wave interaction
*INCIDENT WAVE INTERACTION, NAME=INC1, PROPERTY=PLANEWAVE
SURF_INLET, 1.0, 0.0, 0.0

** Non-reflecting impedance boundaries
*IMPEDANCE, TYPE=NONREFLECTING
SURF_OUTLET

** Field output requests
*OUTPUT, FIELD, FREQUENCY=1
*NODE OUTPUT
P

** History output requests
*OUTPUT, HISTORY, FREQUENCY=1
*NODE PRINT, NSET=PROBE_IN
P
*NODE PRINT, NSET=PROBE_OUT
P

*END STEP
